// COMSOL Multiphysics 5.6.0.280 model "PROYECTO.mph"
// Outline of the model tree

Parameters
  a = 5[nm]  // Lado en x de la super elipse
  b = 5[nm]  // Lado en y de la super elipse
  R1 = 12[nm]  // Radio Primer circulo
  R2 = 20[nm]  // Radio Segundo Circulo
  R3 = 25[nm]  // Radio Tercer Circulo
  V_0 = 262[meV]  // Potencial de barreras
  n = 1  // Forma de la super elipse

Geometry
  geom1 "Geometría 1" (2D, length unit m)
    pc1: ParametricCurve "Curva paramétrica 1"
      coord = {a*sign(cos(s*2*pi))*abs(cos(s*2*pi))^(2/n), b*sign(sin(s*2*pi))*abs(sin(s*2*pi))^(2/n)}
      maxknots = 5000
      reparameterize = on
    c1: Circle "Círculo 1" | r = R1
    c2: Circle "Círculo 2" | r = R2
    c3: Circle "Círculo 3" | r = R3
    sq1: Square "Cuadrado 1" | base = center; size = 150[nm]
    fin: Finalize "Formar unión"

Physics
  schr: SchrodingerEquation "Ecuación de Schrödinger" on all domains
    dependent variable psi
    meff1: EffectiveMass "Masa efectiva 1" (default)
    zflx1: ZeroFlux "Flujo cero 1" (default)
    init1: init "Valores iniciales 1" (default)
    ve2: ElectronPotentialEnergy "Energía potencial de electrón 2" on domains 1, 3, 5 | Ve_src = userdef; Ve = V_0
    ve3: ElectronPotentialEnergy "Energía potencial de electrón 3" on domains 2, 4 | Ve_src = userdef; Ve = 0

Mesh
  mesh1 "Malla 1" (physics-controlled)
    size: MeshSizeDefault "Tamaño" | hauto = 4

Studies
  std1 "Estudio 1"
    eigv: Eigenvalue "Valor propio" | neigs = 20; shift = 0.000001

Solver configurations
  sol1 "Solución 1" (study std1)
    v1: Variables "Variables dependientes 1"
    e1: Eigenvalue "Resolvedor de valores propios 1" | rtol = 1.0E-10; neigs = 20; shift = 0.000001; eigref = 0.1
      dDef: Direct "Directo"

Datasets
  dset1: Solution | solution = sol1

Derived values
  gev1: EvalGlobal "Valor propio"
    data = dset1
    expr = {schr.Ei, schr.int(schr.Pr)}
    unit = {eV, 1}
    descr = {Energía propia, Probabilidad total}

Plots
  pg1: PlotGroup2D "Función de onda normalizada (schr)" | data = dset1
    surf1: Surface "Parte real" | expr = schr.Psi_psi
      hght1: Height "Expresión de altura 1"
    surf2: Surface "Parte imaginaria" | expr = imag(schr.Psi_psi)
      hght1: Height "Expresión de altura 1"
  pg2: PlotGroup2D "Densidad de probabilidad (schr)" | data = dset1
    surf1: Surface "Superficie 1" | expr = schr.Pr
      hght1: Height "Expresión de altura 1"
  pg3: PlotGroup2D "Energía potencial (schr)" | data = dset1
    surf1: Surface "Superficie 1" | expr = schr.V_psi; unit = eV
      hght1: Height "Expresión de altura 1"
  pg4: PlotGroup2D "Masa efectiva (schr)" | data = dset1
    surf1: Surface "Superficie 1" | expr = schr.meff_psiXX/me_const
      hght1: Height "Expresión de altura 1"