// COMSOL Multiphysics 5.6.0.280 model "Tarea 2 DISCO CUANTICO.mph"
// Outline of the model tree

Parameters
  r = 25 [nm]
  V_0 = 262 [meV]

Geometry
  geom1 "Geometría 1" (2D, length unit m)
    sq1: Square "Cuadrado 1" | base = center; size = 200 [nm]
    c1: Circle "Círculo 1" | r = r
    fin: Finalize "Formar unión"

Physics
  schr: SchrodingerEquation "Ecuación de Schrödinger" on all domains
    dependent variable psi
    meff1: EffectiveMass "Masa efectiva 1" (default)
    zflx1: ZeroFlux "Flujo cero 1" (default)
    init1: init "Valores iniciales 1" (default)
    ve2: ElectronPotentialEnergy "Energía potencial de electrón 2" on domains 1 | Ve_src = userdef; Ve = V_0
    ve3: ElectronPotentialEnergy "Energía potencial de electrón 3" on domains 2 | Ve_src = userdef; Ve = 0

Mesh
  mesh1 "Malla 1" (physics-controlled)
    size: MeshSizeDefault "Tamaño" | hauto = 4

Studies
  std1 "Estudio 1"
    eigv: Eigenvalue "Valor propio" | neigs = 2; shift = 0.0001
    eigv2: Eigenvalue "Valor propio 2" | shift = 0.0001

Solver configurations
  sol1 "Solución 1" (study std1)
    v1: Variables "Variables dependientes 1"
    e1: Eigenvalue "Resolvedor de valores propios 1" | rtol = 1.0E-10; neigs = 2; shift = 0.0001; eigref = 0.1
      dDef: Direct "Directo"
    su1: StoreSolution "Almacenar solución 1"
    v2: Variables "Variables dependientes 2" | initmethod = sol; notsolmethod = sol
    e2: Eigenvalue "Resolvedor de valores propios 2" | rtol = 1.0E-10; shift = 0.0001; eigref = 0.1
      dDef: Direct "Directo"
  sol2 "Almacenar solución 1" (study std1)

Datasets
  dset1: Solution | solution = sol1
  dset2: Solution | solution = sol2

Derived values
  gev1: EvalGlobal "Valor propio"
    data = dset1
    table = tbl2
    expr = {schr.Ei, schr.int(schr.Pr)}
    unit = {eV, 1}
    descr = {Energía propia, Probabilidad total}

Tables
  tbl1: Table "Solución 1/Resolvedor de valores propios 1"
    Número de iteración | Error
    0 | 1
    1 | 0.0791548
    2 | 0.00463683
    3 | 0.000828738
    4 | 0.0044549
    5 | 0.000846219
    6 | 0.00186514
    7 | 0.00445969
    8 | 0.0102371
    9 | 0.00746128
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  tbl2: Table "Tabla 2"
    // Valor propio
    Valor propio (rad/s) | Energía propia (eV) | Probabilidad total (1)
    0.00472271 | 0.00472271 | 1
    0.0119784 | 0.0119784 | 1
    0.011994 | 0.011994 | 1
    0.0215246 | 0.0215246 | 1
    0.0215569 | 0.0215569 | 1
    0.024883 | 0.024883 | 1

Plots
  pg1: PlotGroup2D "Función de onda normalizada (schr)" | data = dset1
    surf1: Surface "Parte real" | expr = schr.Psi_psi
      hght1: Height "Expresión de altura 1"
    surf2: Surface "Parte imaginaria" | expr = imag(schr.Psi_psi)
      hght1: Height "Expresión de altura 1"
  pg2: PlotGroup2D "Densidad de probabilidad (schr)" | data = dset1
    surf1: Surface "Superficie 1" | expr = schr.Pr
      hght1: Height "Expresión de altura 1"
  pg3: PlotGroup2D "Energía potencial (schr)" | data = dset1
    surf1: Surface "Superficie 1" | expr = schr.V_psi; unit = eV
      hght1: Height "Expresión de altura 1"
  pg4: PlotGroup2D "Masa efectiva (schr)" | data = dset1
    surf1: Surface "Superficie 1" | expr = schr.meff_psiXX/me_const
      hght1: Height "Expresión de altura 1"
  pg5: PlotGroup2D "Grupo gráfico 2D 5" | data = dset1
  pg6: PlotGroup1D "Grupo gráfico 1D 6" | data = dset1
    lngr1: LineGraph "Gráfico lineal 1" | expr = real(lambda); unit = [meV]; xdata = expr